# Static Stress Analysis
# Camshaft
# Material Properties
# 8620 Steel Per ASTM A29
σ_ult := 530 MPa  # Ultimate Tensile Strength
σ_yield := 385 MPa  # Yield Tensile Strength
E := 200 GPa  # Modulus of Elasticity
G := GPa  # Modulus of Rigidity
ν := 0.30  # Poisson's Ratio
# Free Body Diagram
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# Dimensions
L := 118 mm
d := 20 mm
A := 29 mm
B := 41.66 mm
I := π*d^4/64 = 7853.98 mm^4
C := 59.9 mm
D := 77.09 mm
F := 90 mm
J := 2*I = 15708 mm^4
F_Open := 668 N
F_Closed := 223 N
F_Spring := F_Open = 668 N  # Force of Spring at Max Open Length
Rocker_MA := 40 mm/(25 mm) = 1.6  # Mechanical Advantage from Rocker Arm
F_Rocker := 2*F_Spring/Rocker_MA = 835 N  # Force Applied on Camshaft From Rocker Arm
r_CamLobe := 15 mm
T_Cam := (2*F_Spring)*r_CamLobe = 20.04 N*m
r_Gear := 70.5 mm/2 = 35.25 mm
F_Chain := -T_Cam/r_Gear = -568.511 N
# Solving for Reaction Forces at Bearing Locations in Y-Direction
solve block
    # guess values
    R_Ay := 1 N
    R_By := 1 N
    # constraints
    2*F_Spring + F_Chain - R_Ay - R_By == 0
    -(R_Ay*A) + (F_Spring*B) + (F_Spring*D) - (R_By*F) == 0
    # solver
    [R_Ay; R_By] := find(R_Ay, R_By)
end solve block
R_Ay = -168.048 N
R_By = 935.538 N
# Solving for Reaction Forces at Bearing Locations in Z-Direction
solve block
    # guess values
    R_Az := 1 N
    R_Bz := 1 N
    # constraints
    R_Az + R_Bz - F_Rocker == 0
    (F_Rocker*(C - A)) - (R_Bz*(F - A)) == 0
    # solver
    [R_Az; R_Bz] := find(R_Az, R_Bz)
end solve block
R_Az = 412.025 N
R_Bz = 422.975 N
# Shear and Moment Diagrams XY-Plane
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M_Max_z := 21556.67 N*mm  # Max Moment in z occurs at B
M_z_C := M_Max_z - (F_Chain - R_Ay + F_Spring)*(C - B) = 16.6768 N*m
# Shear and Moment Diagrams XZ-Plane
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M_Max_y := 12731.56 N*mm  # Max Moment in y occurs at C
M_y_B := R_Az*(B - A) = 5216.23 N*mm
# Determining Critical Cross-Section
M_R_B := sqrt(M_Max_z^2 + M_y_B^2) = 22178.8 N*mm
M_R_C := sqrt(M_Max_y^2 + M_z_C^2) = 20981.1 N*mm
Moment_Max := max(M_R_B, M_R_C) = 22178.8 N*mm
# Critical Cross-Section is located at Point B
# Determining Stresses
σ_bend := Moment_Max*0.5*d/I = 28.2389 MPa
τ := T_Cam*0.5*d/J = 12.7579 MPa
τ_max := 16/(π*d^3)*sqrt(Moment_Max^2 + T_Cam^2) = 19.0295 MPa
σ_vm := sqrt(σ_bend^2 + 3*τ^2) = 35.857 MPa
# Safety Factor
FS_yield := σ_yield/σ_vm = 10.7371
FS_ult := σ_ult/σ_vm = 14.7809
# Bearing Safety Factor | (Assuming an axial load equal to the radial load)
# Bearing
# PN: SKF 7203 BEP
C := 10.4 kN  # Basic Dynamic Load Rating
C_0 := 5.5 kN  # Basic Static Load Rating
P_u := 0.236 kN  # Fatigue Load Limit
RPM_max := 20000 rpm  # Max RPM
X_0 := 0.35  # Radial Load Factor
Y_0 := 0.26  # Axial Load Factor
e := 1.1  # Limiting Factor
p := 3  # Exponent of the Life Equation
a_1 := 0.64  # Life Adjustment Factor at 95% Reliability
a_SKF := 25  # Life Modification Factor (Best Estimate)
n := 12500 rpm
# Bearings are located at locations A and F, the loads on the bearings are captured in the Reaction forces above.
F_bearing_A := sqrt(R_Ay^2 + R_Az^2) = 444.977 N
F_bearing_F := sqrt(R_By^2 + R_Bz^2) = 1026.71 N
F_bearing_max := max(F_bearing_A, F_bearing_F) = 1026.71 N  # Max Radial Load
F_axial := F_bearing_max = 1026.71 N  # Axial Load
P_0 := X_0*F_bearing_max + Y_0*F_bearing_max = 626.295 N  # Equivalent Static Bearing Load
S_0 := C_0/P_0 = 8.78181  # Static Safety Factor
P := F_axial
LoadRatio := C/P = 10.1294
# Assuming constant speed at max RPM
L_nm := a_1*a_SKF*(C/P)^p = 16629.3
L_nmh := 10^6/(60*n)*L_nm = 58.814 hr
# Fatigue Analysis
# Camshaft
# Values from Static Analysis
σ_bend = 28.2389 MPa
I = 7853.98 mm^4
σ_vm = 35.857 MPa
J = 15708 mm^4
τ = 12.7579 MPa
# Assumptions
# -Shaft Continuously Rotating and Always Same Direction
#
# -Fully Reversing Bending (More Conservative)
σ'_a := sqrt(σ_bend^2 + 0) = 28.2389 MPa  # Alternating Stress
σ'_m := sqrt(0 + 3*τ^2) = 22.0973 MPa  # Mean Stress
S_e := 0.4*σ_ult = 212 MPa  # Endurance Limit
# Fatigue Factor of Safety  (Shigley's Table 6-8)
n_f := 0.5*(σ_ult/σ'_m)^2*(σ'_a/S_e)*(-1 + sqrt(1 + (2*σ'_m*S_e/(σ_ult*σ'_a))^2)) = 6.88818
# Results
# Although analysis was performed statically, the large safety factor margins of both fatigue and yield stress for the camshaft provide confidence in the addition of dynamic loading caused by high RPM engine operation.
# Fatigue Analysis
# Valve Spring
# Material Properties
# Chromium-Silicon Alloy Steel Wire Per ASTM A401
m := 0.108
A := 1974 MPa*mm^m
d := 3.0 mm
σ_ult := A/d^m = 1753.15 MPa  # (Shigley's Table 10-4)
τ_max := 2/3*σ_ult = 1168.76 MPa
D := 19 mm
C := D/d = 6.33333
K_B := (4*C + 2)/(4*C - 3) = 1.22388
τ_upper := K_B*8*F_Open*D/(π*d^3) = 1465.03 MPa
τ_lower := K_B*8*F_Closed*D/(π*d^3) = 489.073 MPa
τ_m := (τ_upper + τ_lower)/2 = 977.05 MPa  # Mean stress
τ_a := (τ_upper - τ_lower)/2 = 487.977 MPa  # Average Stress
S_u := τ_max = 1168.76 MPa
S_e := 0.4*S_u = 467.506 MPa
n_f := 1/(τ_a/S_e + τ_m/S_u) = 0.531984  # Fatigue Factor of Safety
# Results
# Since the fatigue factor of safety is less than 1, we can expect the spring to fail with the given parameters. Since the torsional stress in wire coil springs is highly dependent on the wire diameter, we will solve for a needed wire diameter to satisfy a fatigue safety factor of 2, however, I will not take into account the calculation of the ultimate strength due to its dependence on d, which will lower the safety factor from the requirement. Iterations will be performed to achieve FOS=2.
d := nthroot(4*K_B*D*((F_Open - F_Closed)/S_e + (F_Open + F_Closed)/S_u)/(0.5*π), 3)
d = 4.66479 mm  # Calculated wire diameter
d := 5 mm  # Iterative wire diameter
# Verification
σ_ult := A/d^m = 1659.05 MPa  # (Shigley's Table 10-4)
τ_max := 2/3*σ_ult = 1106.03 MPa
D := 19 mm
C := D/d = 3.8
K_B := (4*C + 2)/(4*C - 3) = 1.40984
τ_upper := K_B*8*F_Open*D/(π*d^3) = 364.526 MPa
τ_lower := K_B*8*F_Closed*D/(π*d^3) = 121.691 MPa
τ_m := (τ_upper + τ_lower)/2 = 243.108 MPa  # Mean stress
τ_a := (τ_upper - τ_lower)/2 = 121.418 MPa  # Average Stress
S_u := τ_max = 1106.03 MPa
S_e := 0.4*S_u = 442.412 MPa
n_f := 1/(τ_a/S_e + τ_m/S_u) = 2.02328  # Fatigue Factor of Safety
